*Heading
** Job name: Job-flatsheet_avg_at_node Model name: FlatSheet
** Generated by: Abaqus/CAE Unofficial Packaging Version
*Preprint, echo=NO, model=NO, history=NO, contact=NO
**
** PARTS
**
*Part, name=Part-1
*Node
      1,          50.,          25.,           0.
      2,          40.,          25.,           0.
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*Element, type=S3
  1,  1,  2, 13
  2, 13, 12,  1
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*Nset, nset=_PickedSet5, internal, generate
  1,  66,   1
*Elset, elset=_PickedSet5, internal, generate
   1,  100,    1
** Section: Section-1
*Shell Section, elset=_PickedSet5, material=Material-1
0.1, 5
*End Part
**
**
** ASSEMBLY
**
*Assembly, name=Assembly
**
*Instance, name=Part-1-1, part=Part-1
*End Instance
**
*Nset, nset=Set-BC, instance=Part-1-1
  1,  2,  3,  4,  5,  6
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*Elset, elset=Set-BC, instance=Part-1-1
   1,   2,   3,   5,   7,   9
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*End Assembly
**
** MATERIALS
**
*Material, name=Material-1
*Hyperelastic, neo hooke
 3.44828e+08, 3e-10
*Material, name=Material-2
*User Material, constants=2
 2e+09, 0.45
** ----------------------------------------------------------------
**
** STEP: Step-1
**
*Step, name=Step-1, nlgeom=YES
*Static
1., 1., 1e-05, 1.
**
** BOUNDARY CONDITIONS
**
** Name: BC-1 Type: Displacement/Rotation Using Analytical Field: AnalyticalField-1
*Boundary
Part-1-1.1, 1, 1, 12.5
Part-1-1.2, 1, 1, 12.5
Part-1-1.3, 1, 1, 12.5
Part-1-1.4, 1, 1, 12.5
Part-1-1.5, 1, 1, 12.5
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Part-1-1.66, 3, 3
**
** OUTPUT REQUESTS
**
*Restart, write, frequency=0
**
** FIELD OUTPUT: F-Output-1
**
*Output, field
*Node Output, GLOBAL = YES
COORD, U, UR, UT, V, VR, VT
*Element Output, directions=YES, POSITION=AVERAGED AT NODES
LE, S
*EL PRINT, POSITION=AVERAGED AT NODES
DG, S
**
** HISTORY OUTPUT: H-Output-1
**
*Output, history, variable=PRESELECT
*End Step
