*Heading
** Job name: SolidSphereUMAT Model name: SolidSphere
** Generated by: Abaqus/CAE 6.14-1
*Preprint, echo=NO, model=NO, history=NO, contact=NO
**
** PARTS
**
*Part, name=Part-1
*Node
      1,   6.67562819,   29.2478371,           0.
      2,   13.0165119,   27.0290661,           0.
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*Element, type=C3D10
   1,  330,  331,  332,  333,  789,  788,  787,  791,  790,  792
   2,  330,  332,  331,  334,  787,  788,  789,  794,  793,  795
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*Nset, nset=_PickedSet8, internal, generate
    1,  5521,     1
*Elset, elset=_PickedSet8, internal, generate
    1,  3623,     1
*Elset, elset=_Surf-1_S4, internal
   13,  458,  607,  803,  815, 1087
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*Elset, elset=_Surf-1_S3, internal
   21,   30,   51,   54,   80,  101
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*Elset, elset=_Surf-1_S1, internal
  339,  784,  933, 1375, 1423, 1538, 2109, 2303, 2459, 2539, 2725, 2772, 3006, 3300, 3599
*Elset, elset=_Surf-1_S2, internal
  392, 1663, 1762, 1882, 2192, 2207
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*Surface, type=ELEMENT, name=Surf-1
_Surf-1_S4, S4
_Surf-1_S3, S3
_Surf-1_S2, S2
_Surf-1_S1, S1
** Section: Section-1
*Solid Section, elset=_PickedSet8, material=Material-2
,
*End Part
**
**
** ASSEMBLY
**
*Assembly, name=Assembly
**
*Instance, name=Part-1-1, part=Part-1
*End Instance
**
*Nset, nset=Set-bc, instance=Part-1-1
    1,    2,    3,    4,    5,    6
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*Elset, elset=Set-bc, instance=Part-1-1
   13,   21,   30,   51,   54,   80
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*End Assembly
**
** MATERIALS
**
*Material, name=Material-1
*Hyperelastic, neo hooke
 3.44828e+08, 3e-10
*Material, name=Material-2
*User Material, constants=2
 3.44828e+08, 3e-10
** ----------------------------------------------------------------
**
** STEP: Step-1
**
*Step, name=Step-1, nlgeom=YES
*Static
1., 1., 1e-05, 1.
**
** BOUNDARY CONDITIONS
**
** Name: BC-1 Type: Displacement/Rotation Using Analytical Field: AnalyticalField-1
*Boundary
Part-1-1.1, 1, 1, 14.6239
Part-1-1.2, 1, 1, 13.5145
Part-1-1.3, 1, 1, 11.7275
Part-1-1.4, 1, 1, 9.35235
Part-1-1.5, 1, 1, 6.50826
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Part-1-1.5521, 3, 3
**
** OUTPUT REQUESTS
**
*Restart, write, frequency=0
**
** FIELD OUTPUT: F-Output-1
**
*Output, field
*Node Output
CF, COORD, RF, RM, RT, TF, U, UR
UT, V, VF, VR, VT
*Element Output, directions=NO
ALPHA, ALPHAN, BF, CENTMAG, CENTRIFMAG, CORIOMAG, CS11, CTSHR, E, EE, ER, ESF1, GRAV, HP, IE, LE
MISES, MISESMAX, MISESONLY, NE, NFORC, NFORCSO, P, PE, PEEQ, PEEQMAX, PEEQT, PEMAG, PEQC, PRESSONLY, PS, ROTAMAG
S, SALPHA, SE, SEE, SEP, SEPE, SF, SPE, SSAVG, THE, TRIAX, TRNOR, TRSHR, TSHR, VE, VEEQ
VS
*EL PRINT
DG
**
** HISTORY OUTPUT: H-Output-1
**
*Output, history, variable=PRESELECT
*End Step
