*Heading
** Job name: SolidSphere_XY Model name: SolidSphereSmall
** Generated by: Abaqus/CAE 6.14-1
*Preprint, echo=NO, model=NO, history=NO, contact=NO
**
** PARTS
**
*Part, name=Part-1
*Node
      1,   3.18955302,  -3.18421936,           0.
      2,   2.50627255,  -3.74581075,           0.
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*Element, type=C3D4
   1,  441,  442,  443,  444
   2,  441,  443,  445,  444
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*Nset, nset=_PickedSet10, internal, generate
    1,  1048,     1
*Elset, elset=_PickedSet10, internal, generate
    1,  4869,     1
** Section: Section-1
*Solid Section, elset=_PickedSet10, material=Material-1
,
*End Part
**
**
** ASSEMBLY
**
*Assembly, name=Assembly
**
*Instance, name=Part-1-1, part=Part-1
*End Instance
**
*Nset, nset=Set-bc, instance=Part-1-1, generate
   1,  440,    1
*Elset, elset=Set-bc, instance=Part-1-1
   37,   82,  106,  137,  214,  297
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*Nset, nset=_PickedSet6, internal, instance=Part-1-1, generate
   1,  440,    1
*Elset, elset=_PickedSet6, internal, instance=Part-1-1
   37,   82,  106,  137,  214,  297
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*Nset, nset=_PickedSet7, internal, instance=Part-1-1, generate
   1,  440,    1
*Elset, elset=_PickedSet7, internal, instance=Part-1-1
   37,   82,  106,  137,  214,  297
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*Nset, nset=_PickedSet8, internal, instance=Part-1-1, generate
   1,  440,    1
*Elset, elset=_PickedSet8, internal, instance=Part-1-1
   37,   82,  106,  137,  214,  297
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*End Assembly
**
** MATERIALS
**
*Material, name=Material-1
*Hyperelastic, neo hooke
 3.44828e+08, 3e-10
** ----------------------------------------------------------------
**
** STEP: Step-1
**
*Step, name=Step-1, nlgeom=YES
*Static
1., 1., 1e-05, 1.
**
** BOUNDARY CONDITIONS
**
** Name: BC-X Type: Displacement/Rotation Using Analytical Field: AnalyticalField-1
*Boundary
Part-1-1.1, 1, 1, -1.59211
Part-1-1.2, 1, 1, -1.87291
Part-1-1.3, 1, 1, -2.08157
Part-1-1.4, 1, 1, -2.21008
Part-1-1.5, 1, 1, -1.25
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Part-1-1.440, 1, 1, 1.95429
** Name: BC-Y Type: Displacement/Rotation Using Analytical Field: AnalyticalField-2
*Boundary
Part-1-1.1, 2, 2
Part-1-1.2, 2, 2
Part-1-1.3, 2, 2
Part-1-1.4, 2, 2
Part-1-1.5, 2, 2
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Part-1-1.440, 2, 2, 0.203945
** Name: BC-Z Type: Displacement/Rotation
*Boundary
_PickedSet8, 3, 3, 1.
**
** OUTPUT REQUESTS
**
*Restart, write, frequency=0
**
** FIELD OUTPUT: F-Output-1
**
*Output, field
*Node Output
COORD, U, UR, UT, V, VR, VT
*Element Output, directions=NO
E, EE, ER, IE, LE, NE, PE, PEEQ, PEEQMAX, PEEQT, PEMAG, PEQC, S, SALPHA, SE, SEE
SEP, SEPE, SPE, THE, VE, VEEQ
*EL PRINT, POSITION=CENTROID
DG
**
** HISTORY OUTPUT: H-Output-1
**
*Output, history, variable=PRESELECT
*End Step
