*Heading
** Job name: SolidSphereFine2_shear Model name: SolidSphereFine
** Generated by: Abaqus/CAE Unofficial Packaging Version
*Preprint, echo=NO, model=NO, history=NO, contact=NO
**
** PARTS
**
*Part, name=Part-1
*Node
      1,  0.124681517, -0.00891739782,           0.
      2,  0.122143358, -0.026570661,           0.
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*Element, type=C3D4
    1, 2502, 2503, 2504, 2505
    2, 2503, 2506, 2504, 2505
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*Nset, nset=_PickedSet6, internal, generate
    1,  8986,     1
*Elset, elset=_PickedSet6, internal, generate
     1,  46472,      1
*Nset, nset=Set-bc, generate
    1,  2501,     1
*Elset, elset=Set-bc
    43,    55,    71,   130,   170,   172
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** Section: Section-1
*Solid Section, elset=_PickedSet6, material=Material-1
,
*End Part
**
**
** ASSEMBLY
**
*Assembly, name=Assembly
**
*Instance, name=Part-1-1, part=Part-1
*End Instance
**
*Nset, nset=Set-bc, instance=Part-1-1, generate
    1,  2501,     1
*Elset, elset=Set-bc, instance=Part-1-1
    43,    55,    71,   130,   170,   172
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*Nset, nset=Set-leftPoint, instance=Part-1-1
 44,
*Nset, nset=Set-leftsmall, instance=Part-1-1
   43,   44,   45, 1297, 1299, 1328, 1329, 1330, 2836
*Nset, nset=Set-rightPoint, instance=Part-1-1
 15,
*Nset, nset=Set-rightsmall, instance=Part-1-1
   1,  15,  30,  80, 106, 657, 686
*Nset, nset=_PickedSet26, internal, instance=Part-1-1, generate
    1,  8986,     1
*Elset, elset=_PickedSet26, internal, instance=Part-1-1, generate
     1,  46472,      1
*Nset, nset=_PickedSet27, internal, instance=Part-1-1, generate
    1,  8986,     1
*Elset, elset=_PickedSet27, internal, instance=Part-1-1, generate
     1,  46472,      1
*Nset, nset=_PickedSet28, internal, instance=Part-1-1, generate
    1,  8986,     1
*Elset, elset=_PickedSet28, internal, instance=Part-1-1, generate
     1,  46472,      1
*End Assembly
**
** MATERIALS
**
*Material, name=Material-1
*Hyperelastic, neo hooke
 3.44828e+08, 3e-10
** ----------------------------------------------------------------
**
** STEP: Step-1
**
*Step, name=Step-1, nlgeom=YES
*Static
1., 1., 1e-05, 1.
**
** BOUNDARY CONDITIONS
**
** Name: BC-shear Type: Displacement/Rotation Using Analytical Field: AnalyticalField-shear_Y
*Boundary
Part-1-1.1, 1, 1
Part-1-1.2, 1, 1
Part-1-1.3, 1, 1
Part-1-1.4, 1, 1
Part-1-1.5, 1, 1
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Part-1-1.2501, 3, 3
**
** OUTPUT REQUESTS
**
*Restart, write, frequency=0
**
** FIELD OUTPUT: F-Output-1
**
*Output, field
*Node Output
CF, COORD, RF, U
*Element Output, directions=NO
LE, PE, PEEQ, PEMAG, S
*Contact Output
CDISP, CSTRESS
*EL PRINT, POSITION=CENTROID
DG
**
** HISTORY OUTPUT: H-Output-1
**
*Output, history, variable=PRESELECT
*End Step
