*Heading
** Job name: squarePlateUltra_right-qrtr-parabola Model name: squarePlate
** Generated by: Abaqus/CAE Unofficial Packaging Version
*Preprint, echo=NO, model=NO, history=NO, contact=NO
**
** PARTS
**
*Part, name=Part-2
*Node
      1, -0.675000012, -0.675000012
      2, -0.668749988, -0.675000012
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*Element, type=CPS4
    1,     1,     2,   219,   218
    2,     2,     3,   220,   219
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*Nset, nset=_PickedSet4, internal, generate
     1,  47089,      1
*Elset, elset=_PickedSet4, internal, generate
     1,  46656,      1
** Section: Section-1
*Solid Section, elset=_PickedSet4, material=Neo-Hookean
,
*End Part
**
**
** ASSEMBLY
**
*Assembly, name=Assembly
**
*Instance, name=Part-2-1, part=Part-2
*End Instance
**
*Nset, nset=_PickedSet12, internal, instance=Part-2-1, generate
     1,  46873,    217
*Elset, elset=_PickedSet12, internal, instance=Part-2-1, generate
     1,  46441,    216
*Nset, nset=_PickedSet13, internal, instance=Part-2-1, generate
   217,  47089,    217
*Elset, elset=_PickedSet13, internal, instance=Part-2-1, generate
   216,  46656,    216
*Nset, nset=_PickedSet14, internal, instance=Part-2-1
     1,     2,     3,     4,     5,     6
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*Elset, elset=_PickedSet14, internal, instance=Part-2-1
     1,     2,     3,     4,     5,     6
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*End Assembly
**
** MATERIALS
**
*Material, name=Neo-Hookean
*Hyperelastic, neo hooke
 3.44828e+08, 3e-10
** ----------------------------------------------------------------
**
** STEP: Step-1
**
*Step, name=Step-1, nlgeom=YES
*Static
1., 1., 1e-05, 1.
**
** BOUNDARY CONDITIONS
**
** Name: BC top bottom Type: Displacement/Rotation
*Boundary
_PickedSet14, 2, 2
** Name: Fix left part 2 Type: Symmetry/Antisymmetry/Encastre
*Boundary
_PickedSet12, ENCASTRE
** Name: pull right Type: Displacement/Rotation Using Analytical Field: parabola14
*Boundary
Part-2-1.217, 1, 1, 0.113906
Part-2-1.434, 1, 1, 0.111807
Part-2-1.651, 1, 1, 0.109727
Part-2-1.868, 1, 1, 0.107666
Part-2-1.1085, 1, 1, 0.105625
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Part-2-1.47089, 6, 6
**
** OUTPUT REQUESTS
**
*Restart, write, frequency=0
**
** FIELD OUTPUT: F-Output-1
**
*Output, field
*Node Output
CF, RF, U, UR
*Element Output, directions=NO
LE, PE, PEEQ, PEMAG, S, STH
*EL PRINT, POSITION=AVERAGED AT NODES
DG
**
** HISTORY OUTPUT: H-Output-1
**
*Output, history, variable=PRESELECT
*End Step
